<neuroml xmlns="http://www.neuroml.org/schema/neuroml2"  xmlns:xs="http://www.w3.org/2001/XMLSchema" xmlns:xsi="http://www.w3.org/2001/XMLSchema-instance" xsi:schemaLocation="http://www.neuroml.org/schema/neuroml2 https://raw.github.com/NeuroML/NeuroML2/development/Schemas/NeuroML2/NeuroML_v2beta4.xsd" id="hhcell">
    <include href="NML2_SingleCompHHCell.nml"></include>
    <network id="network" type="networkWithTemperature" temperature="35degC">
        <population id="hhpop" type="populationList" component="hhcell" size="1">
            <instance id="0">
                <location y="0." x="0." z="0."/>
            </instance>
        </population>
    </network>
</neuroml>
